Simulations: Version=147
  DataStore
    ExcelInput: FileNames=[DepthMerged.xlsx]; SheetNames=[Merged]
  Memo Read me 14 steps
    ## learn APSIM next gen
    1. go through some examples and apsim website/training videos
    2. in particular focus on optimization and sensitivity tools
    3. familiarize yourself with the source code & how we add new equations into apsim

    ## model development and parametrization
    1. set up the 28 experiments in apsim (5 categories, see excel and pptx)
    2. add measured data into the UI
    3. create graphs (obs vs sims) with default model
    4. develop and add equations in the soybean emergence model (see pptx)
    5. use apsim R optimization algorithm to optimize constant parameters values (see apsim example for how to use the optimizer)
    6. calculate statitsics (eg RMSE) and other using APSIM tools

    ## model validation
    1. set up validation field experiments in apsim (n=50 to 100)
    2. add observations and graphs (obs vs predicted)
    3. calculate statistics

    ## submit new code and publication
    1. the publication is 60% written
    2. once we have the paper published or before we submit the new code via github to APSIM Reference panel for review and release
  CroptimizR: PredictedTableName=ReportSoybean; ObservedTableName=Merged; VariableNames=Emerged
    Parameters:
      {Name=DepthGDD1, Path=[Soybean].Phenology.DepthGDDTarget.XYPairs.Y[1], LowerBound=60, UpperBound=140}
      {Name=DepthGDD2, Path=[Soybean].Phenology.DepthGDDTarget.XYPairs.Y[2], LowerBound=112, UpperBound=204}
      {Name=DepthGDD3, Path=[Soybean].Phenology.DepthGDDTarget.XYPairs.Y[3], LowerBound=210, UpperBound=390}
    OptimizationMethod={CriticalFunction=1, NoRepetitions=10, Tolerance=1e-05, MaxEval=10}
    Experiment ExpDepth
      Factors
        Factor Depth: Specification=[paddock].Sow.Script.SowingDepth = 0,25,50,75
      Simulation Soy
        Clock: Start=2018-06-01; End=2018-06-22
        Summary summaryfile
        Weather: FileName=Ames_2021.11.13.met
        SoilArbitrator Soil Arbitrator
        Zone paddock: Area=1; Slope=0; AspectAngle=0; Altitude=50
          Fertiliser
          Soil: ASCOrder=Vertosol; ASCSubOrder=Black; SoilType=Clay; Site=Norwin; NearestTown=Norwin; Region=Darling Downs and Granite Belt; State=Queensland; Country=Australia; NaturalVegetation=Qld. Bluegrass, possible Qld. Blue gum; ApsoilNumber=900; Latitude=-27.581836; Longitude=151.320206; LocationAccuracy=+/- 20m
            DataSource=CSIRO Sustainable Ecosystems, Toowoomba; Characteriesd as part of the GRDC funded project"Doing it better, doing it smarter, managing soil water in Australian agriculture' 2011
            Comments=OC, CLL for all crops estimated-based on Bongeen Mywybilla Soil No1
            Physical
              Thickness  BD       AirDry   LL15  DUL   SAT   KS
              150        1.01056  0.13025  0.16  0.33  0.48  20
              150        1.07146  0.16     0.16  0.33  0.48  20
              300        1.09394  0.16     0.16  0.33  0.48  20
              300        1.15861  0.16     0.16  0.33  0.48  20
              300        1.17301  0.16     0.16  0.33  0.48  20
              300        1.16287  0.16     0.16  0.33  0.48  20
              300        1.1875   0.16     0.16  0.33  0.48  20
              SoilCrop SoybeanSoil: LL=[0.16, 0.17, 0.2, 0.22, 0.24, 0.26, 0.3]; KL=[0.06, 0.06, 0.06, 0.04, 0.04, 0.02, 0.01]; XF=[1, 1, 1, 1, 1, 1, 1]
            WaterBalance SoilWater: SummerDate=1-Nov; SummerU=5; SummerCona=5; WinterDate=1-Apr; WinterU=5; WinterCona=5; DiffusConst=40; DiffusSlope=16; Salb=0.12; CN2Bare=73; CNRed=20; CNCov=0.8; Thickness=[150, 150, 300, 300, 300, 300, 300]; SWCON=[0.3, 0.3, 0.3, 0.3, 0.3, 0.3, 0.3]
            Organic: FOMCNRatio=40
              Thickness  Carbon  SoilCNRatio  FBiom  FInert  FOM
              150        1.2     12           0.04   0.4     347.129
              150        0.96    12           0.02   0.6     270.344
              300        0.6     12           0.02   0.8     163.972
              300        0.3     12           0.02   1       99.4541
              300        0.18    12           0.01   1       60.322
              300        0.12    12           0.01   1       36.5871
              300        0.12    12           0.01   1       22.1912
            Chemical
              Thickness  NO3N  NH4N  PH
              150        1     0.1   8
              150        1     0.1   8
              300        1     0.1   8
              300        1     0.1   8
              300        1     0.1   8
              300        1     0.1   8
              300        1     0.1   8
            InitialWater: PercentMethod=1; FractionFull=1
            Sample InitialN: Thickness=[150, 150, 300, 300, 300, 300, 300]; SWUnits=Volumetric; OCUnits=Total; PHUnits=Water
            CERESSoilTemperature Temperature
            Nutrient
          SurfaceOrganicMatter: InitialResidueName=maize; InitialResidueType=maize; InitialResidueMass=100; InitialStandingFraction=0; InitialCPR=0; InitialCNR=55
          MicroClimate: a_interception=0; b_interception=1; c_interception=0; d_interception=0; SoilHeatFluxFraction=0.4; MinimumHeightDiffForNewLayer=0; NightInterceptionFraction=0.5; ReferenceHeight=2
          Manager SowingFertiliser
            Amount = 10
            CropName = soybean
```csharp
using Models.PMF;
using Models.Core;
using System;
namespace Models
{
    [Serializable]
    public class Script : Model
    {
        [Link] Clock Clock;
        [Link] Fertiliser Fertiliser;
        [Link] Summary Summary;
        
        
        [Description("Amount of fertiliser to be applied (kg/ha)")]
        public double Amount { get; set;}
        
        [Description("Crop to be fertilised")]
        public string CropName { get; set;}
        
        
        

        [EventSubscribe("Sowing")]
        private void OnSowing(object sender, EventArgs e)
        {
            Model crop = sender as Model;
            if (crop.Name.ToLower()==CropName.ToLower())
                Fertiliser.Apply(Amount: Amount, Type: Fertiliser.Types.NO3N);
        }
        
    }
}
```
          Manager Harvesting
```csharp
using Models.PMF.Phen;
using APSIM.Shared.Utilities;
using System.Xml.Serialization;
using Models;
using Models.PMF;
using Models.Soils;
using System.Text;
using System.Collections.Generic;
using Models.Core;
using System;
using Models.Soils.Nutrients;

namespace Models
{
    [Serializable] 
    public class Script : Model
    {
        [Link] private Plant Soybean;
        [Link] private Zone zone;
        [Link(Type = LinkType.Path, Path = "[Soybean].Phenology")]
        private Phenology phenology;
                    
        
        [EventSubscribe("StartOfSimulation")]
        private void OnSimulationCommencing(object sender, EventArgs e)
        {
        }
        
        [EventSubscribe("DoManagement")]
        private void OnDoManagement(object sender, EventArgs e)
        {
            if (phenology.CurrentPhase.Name == "ReadyForHarvesting")
            {
                Soybean.Harvest();
                Soybean.EndCrop();
            }
        }
        
        [EventSubscribe("DoManagementCalculations")]
        private void OnDoManagementCalculations(object sender, EventArgs e)
        {
            
        }
    }
}
```
          Manager Sow
            SowingDepth = 50
            Crop = [Soybean]
            SowDate = 1-Jun
            CultivarName = PioneerP92Y75_MG27
            RowSpacing = 750
            Population = 10
```csharp
using APSIM.Shared.Utilities;
using Models.Utilities;
using Models.Soils;
using Models.PMF;
using Models.Core;
using System;

namespace Models
{
    [Serializable]
    public class Script : Model
    {
        [Link] Clock Clock;
        [Link] Fertiliser Fertiliser;
        [Link] Summary Summary;
        [Link] Soil Soil;
        
        [Description("Crop")]
        public IPlant Crop { get; set; }

        [Description("Sowing date (d-mmm)")]
        public string SowDate { get; set; }

        [Display(Type = DisplayType.CultivarName)]
        [Description("Cultivar to be sown")]
        public string CultivarName { get; set; }

        [Description("Sowing depth (mm)")]
        public double SowingDepth { get; set; }

        [Description("Row spacing (mm)")]
        public double RowSpacing { get; set; }

        [Description("Plant population (/m2)")]
        public double Population { get; set; }

        [EventSubscribe("DoManagement")]
        private void OnDoManagement(object sender, EventArgs e)
        {
            if (DateUtilities.WithinDates(SowDate, Clock.Today, SowDate))
            {
                Crop.Sow(population: Population, cultivar: CultivarName, depth: SowingDepth, rowSpacing: RowSpacing);    
            }
        }
    }
}
```
          Report ReportSoybean: EventNames=[Clock].EndOfDay
            VariableNames:
              [Clock].Today as Clock.Today
              [Soybean].AboveGround.Wt
              [Soybean].Grain.Total.Wt
              //==== Phenology
              [Soybean].Phenology.Stage
              [Soybean].Phenology.CurrentStageName
              [Soybean].Phenology.AccumulatedEmergedTT
              [Soybean].Phenology.AccumulatedTT
              [NormalizedEmergence].Script.emergenceFraction * [Soybean].Population as Emerged
              //[Soybean].Phenology.FractionInCurrentPhase * [Sow].Script.Population as Emerged
              [Soybean].Phenology.Zadok
              [Soil].Physical.LL15[1]
              [Soil].Physical.DUL[1]
              [Soil].Physical.SAT[1]
              [Soil].SoilWater.SW[1]                           // not active in soybean
              [Soybean].Phenology.Germinating.GerminationDate
              [Soybean].Phenology.Emerging.EmergenceDate             // missing maturity date (to-do)
              [Soybean].Phenology.EmergenceDAS
              [Soybean].Phenology.FloweringDAS
              [Soybean].Phenology.MaturityDAS
              [Soybean].Phenology.Photoperiod.DayLength
              [Soybean].Phenology.ThermalTime
              [Soybean].Phenology.Germinating.Start
              [Soybean].Phenology.Germinating.End
              [Soybean].Phenology.Emerging.ProgressThroughPhase
              [Soybean].Phenology.Emerging.Target
              [Soybean].Phenology.EarlyFlowering.ProgressThroughPhase
              [Soybean].Phenology.EarlyFlowering.Target
              [Soybean].Phenology.EarlyPodDevelopment.ProgressThroughPhase
              [Soybean].Phenology.EarlyPodDevelopment.Target
              [Soybean].Phenology.EarlyGrainFilling.ProgressThroughPhase
              [Soybean].Phenology.EarlyGrainFilling.Target
              [Soybean].Phenology.LateGrainFilling.ProgressThroughPhase
              [Soybean].Phenology.LateGrainFilling.Target
              [Soybean].Phenology.Maturing.ProgressThroughPhase
              [Soybean].Phenology.Maturing.Target
          Manager NormalizedEmergence
            emergenceFraction = 0
```csharp
using Models.PMF.Phen;
using APSIM.Shared.Utilities;
using System.Xml.Serialization;
using Models;
using Models.PMF;
using Models.Soils;
using System.Text;
using System.Collections.Generic;
using Models.Core;
using System;
using Models.Soils.Nutrients;

namespace Models
{
    [Serializable] 
    public class Script : Model
    {
        [Link] private Plant Soybean;
        [Link] private Zone zone;
        [Link(Type = LinkType.Path, Path = "[Soybean].Phenology")]
        private Phenology phenology;
        
        [Description("NormalizedEmergenceFraction")]
        public double emergenceFraction { get; set; }
                    
        [EventSubscribe("StartOfSimulation")]
        private void OnSimulationCommencing(object sender, EventArgs e)
        {
			emergenceFraction = 0.0f;
        }
        
        [EventSubscribe("DoManagement")]
        private void OnDoManagement(object sender, EventArgs e)
        {
        	if (phenology.CurrentPhaseName == "Germinating")
        		emergenceFraction = 0.0f;
        	else if (phenology.CurrentPhaseName == "Emerging")
        		emergenceFraction = phenology.FractionInCurrentPhase;
        	else
                emergenceFraction = 1.0f;
        }
    }
}
```
          Plant Soybean
      Replacements
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